# OpenSim document version 10902
Model DAS2:
  gravity: 0 -9.80665 0
  defaults: Schutte1993Muscle defaultmuscle: max_isometric_force=0.001 optimal_fiber_length=10 tendon_slack_length=1
      pennation_angle=0 max_contraction_velocity=10 damping=0.1 activation1=7.667 activation2=1.459854 time_scale=0.1
    tendon_force_length_curve: NaturalCubicSpline: x=(-10 -0.002 -0.001 0 0.00131 0.00281 0.00431 0.00581 0.00731 0.00881 0.0103 0.0118 0.0123 9.2 9.201 9.202 20)
        y=(0 0 0 0 0.0108 0.0257 0.0435 0.0652 0.0915 0.123 0.161 0.208 0.227 345 345 345 345)
    active_force_length_curve: NaturalCubicSpline: x=(-0.02 -0.01 0 0.1 0.2 0.3 0.4 0.5 0.6 0.7 0.8 0.9 1 1.1 1.2 1.3 1.4 1.5 1.6 1.7 1.8 1.9 2 2.01 2.02)
        y=(0 0 0 0.19 0.36 0.51 0.64 0.75 0.84 0.91 0.96 0.99 1 0.99 0.96 0.91 0.84 0.75 0.64 0.51 0.36 0.19 0 0 0)
    passive_force_length_curve: NaturalCubicSpline: x=(0.98 0.99 1 1.1 1.2 1.3 1.4 1.5 1.6 1.7 1.8 1.9 2 2.1 2.2 2.3 2.4 2.5 2.6 2.7 2.8 2.9 3 4)
        y=(0 0 0 0.01 0.04 0.09 0.16 0.25 0.36 0.49 0.64 0.81 1 1.21 1.44 1.69 1.96 2.25 2.56 2.89 3.24 3.61 4 9)
    force_velocity_curve: NaturalCubicSpline: x=(-1 -0.95 -0.9 -0.85 -0.8 -0.75 -0.7 -0.65 -0.6 -0.55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)
        y=(0 0.010417 0.021739 0.034091 0.047619 0.0625 0.078947 0.097222 0.117647 0.140625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)
  ForceSet:
    ObjectGroup delt_scap: members=(delt_scap10 delt_scap11 delt_scap_1 delt_scap_2 delt_scap_3 delt_scap_4 delt_scap_5 delt_scap_6 delt_scap_7 delt_scap_8 delt_scap_9)
    ObjectGroup delt_clav: members=(delt_clav_1 delt_clav_2 delt_clav_3 delt_clav_4)
    ObjectGroup coracobr: members=(coracobr_1 coracobr_2 coracobr_3)
    ObjectGroup infra: members=(infra_1 infra_2 infra_3 infra_4 infra_5 infra_6)
    ObjectGroup ter_min: members=(ter_min_1 ter_min_2 ter_min_3)
    ObjectGroup ter_maj: members=(ter_maj_1 ter_maj_2 ter_maj_3 ter_maj_4)
    ObjectGroup supra: members=(supra_1 supra_2 supra_3 supra_4)
    ObjectGroup subscap: members=(subscap10 subscap11 subscap_1 subscap_2 subscap_3 subscap_4 subscap_5 subscap_6 subscap_7 subscap_8 subscap_9)
    ObjectGroup bic_c_l: members=bic_l
    ObjectGroup bic_c_b: members=(bic_b_1 bic_b_2)
    ObjectGroup triceps: members=(tric_l_1 tric_l_2 tric_l_3 tric_l_4)
    ObjectGroup lat_dorsi: members=(lat_dorsi_1 lat_dorsi_2 lat_dorsi_3 lat_dorsi_4 lat_dorsi_5 lat_dorsi_6)
    ObjectGroup pect_maj_t: members=(pect_maj_t_1 pect_maj_t_2 pect_maj_t_3 pect_maj_t_4 pect_maj_t_5 pect_maj_t_6)
    ObjectGroup pect_maj_c: members=(pect_maj_c_1 pect_maj_c_2)
    ObjectGroup tric_med: members=(tric_med_1 tric_med_2 tric_med_3 tric_med_4 tric_med_5)
    ObjectGroup brachialis: members=(brachialis_1 brachialis_2 brachialis_3 brachialis_4 brachialis_5 brachialis_6 brachialis_7)
    ObjectGroup brachiorad: members=(brachiorad_1 brachiorad_2 brachiorad_3)
    ObjectGroup pron_teres_hr: members=pron_teres_1
    ObjectGroup pron_teres_ur: members=pron_teres_2
    ObjectGroup supinator_ur: members=(supinator_1 supinator_2 supinator_3 supinator_4 supinator_5)
    ObjectGroup pron_quad: members=(pron_quad_1 pron_quad_2 pron_quad_3)
    ObjectGroup tric_lat: members=(tric_lat_1 tric_lat_2 tric_lat_3 tric_lat_4 tric_lat_5)
    ObjectGroup anconeus: members=(anconeus_1 anconeus_2 anconeus_3 anconeus_4 anconeus_5)
    Schutte1993Muscle delt_scap_1: max_isometric_force=289 optimal_fiber_length=0.1128 tendon_slack_length=0.08
        pennation_angle=0.08726646 activation1=25.90274 activation2=11.97605 mass=0.03703
      PathPoint: scapula_r (-0.08278 -0.00082 -0.00086)
      PathPoint: humerus_r (0.01347 -0.11128 0.00919)
      PathWrap: wrap_object=deltoid
    Schutte1993Muscle delt_scap_2: max_isometric_force=211 optimal_fiber_length=0.0949 tendon_slack_length=0.076
        pennation_angle=0.08726646 activation1=25.90274 activation2=11.97605 mass=0.02269
      PathPoint: scapula_r (-0.04999 0.00627 0.00113)
      PathPoint: humerus_r (0.01555 -0.09645 0.00528)
      PathWrap: wrap_object=deltoid
    Schutte1993Muscle delt_scap_3: max_isometric_force=446 optimal_fiber_length=0.0833 tendon_slack_length=0.062
        pennation_angle=0.08726646 activation1=25.90274 activation2=11.97605 mass=0.04214
      PathPoint: scapula_r (-0.01438 0.00574 -0.00141)
      PathPoint: humerus_r (0.01555 -0.09645 0.00528)
      PathWrap: wrap_object=deltoid
    Schutte1993Muscle delt_scap_4: max_isometric_force=117 optimal_fiber_length=0.0666 tendon_slack_length=0.045
        pennation_angle=0.08726646 activation1=25.90274 activation2=11.97605 mass=0.00888
      PathPoint: scapula_r (-0.003 -0.00452 -0.00481)
      PathPoint: humerus_r (0.01571 -0.08467 0.00404)
      PathWrap: wrap_object=deltoid
    Schutte1993Muscle delt_scap_5: max_isometric_force=120 optimal_fiber_length=0.0656 tendon_slack_length=0.035
        pennation_angle=0.08726646 activation1=120.0992 activation2=29.15452 mass=0.00891
      PathPoint: scapula_r (0.01299 0.00078 -0.01734)
      PathPoint: humerus_r (0.01678 -0.07782 0.00066)
      PathWrap: wrap_object=deltoid
    Schutte1993Muscle delt_scap_6: max_isometric_force=285 optimal_fiber_length=0.0767 tendon_slack_length=0.067
        pennation_angle=0.08726646 activation1=120.0992 activation2=29.15452 mass=0.02485
      PathPoint: scapula_r (0.00362 0.00532 -0.00502)
      PathPoint: humerus_r (0.01646 -0.10894 0.00661)
      PathWrap: wrap_object=deltoid
    Schutte1993Muscle delt_scap_7: max_isometric_force=149 optimal_fiber_length=0.0754 tendon_slack_length=0.082
        pennation_angle=0.08726646 activation1=120.0992 activation2=29.15452 mass=0.01275
      PathPoint: scapula_r (0.00849 0.00027 -0.00918)
      PathPoint: humerus_r (0.01579 -0.1316 0.00516)
      PathWrap: wrap_object=deltoid
    Schutte1993Muscle delt_scap_8: max_isometric_force=215 optimal_fiber_length=0.071 tendon_slack_length=0.065
        pennation_angle=0.08726646 activation1=120.0992 activation2=29.15452 mass=0.0173
      PathPoint: scapula_r (0.01412 0.00617 -0.0181)
      PathPoint: humerus_r (0.01646 -0.10894 0.00661)
      PathWrap: wrap_object=deltoid
    Schutte1993Muscle delt_scap_9: max_isometric_force=286 optimal_fiber_length=0.0732 tendon_slack_length=0.071
        pennation_angle=0.08726646 activation1=120.0992 activation2=29.15452 mass=0.02378
      PathPoint: scapula_r (0.01569 0.0048 -0.02414)
      PathPoint: humerus_r (0.01847 -0.11738 -0.00494)
      PathWrap: wrap_object=deltoid
    Schutte1993Muscle delt_scap10: max_isometric_force=445 optimal_fiber_length=0.0748 tendon_slack_length=0.064
        pennation_angle=0.08726646 activation1=120.0992 activation2=29.15452 mass=0.0379
      PathPoint: scapula_r (0.01771 0.00508 -0.03311)
      PathPoint: humerus_r (0.0183 -0.10592 -0.00605)
      PathWrap: wrap_object=deltoid
    Schutte1993Muscle delt_scap11: max_isometric_force=239 optimal_fiber_length=0.0737 tendon_slack_length=0.048
        pennation_angle=0.08726646 activation1=79.16934 activation2=23.92344 mass=0.02012
      PathPoint: scapula_r (0.01522 0.00824 -0.04508)
      PathPoint: humerus_r (0.01806 -0.09231 -0.00863)
      PathWrap: wrap_object=deltoid
    Schutte1993Muscle delt_clav_1: max_isometric_force=128 optimal_fiber_length=0.0836 tendon_slack_length=0.062
        pennation_angle=0.08726646 activation1=79.16934 activation2=23.92344 mass=0.01217
      PathPoint: clavicle_r (0.1509 0.02065 0.00128)
      PathPoint: humerus_r (0.01806 -0.09231 -0.00863)
      PathWrap: wrap_object=deltoid
    Schutte1993Muscle delt_clav_2: max_isometric_force=160 optimal_fiber_length=0.094 tendon_slack_length=0.088
        pennation_angle=0.08726646 activation1=79.16934 activation2=23.92344 mass=0.01701
      PathPoint: clavicle_r (0.12912 0.02578 0.00498)
      PathPoint: humerus_r (0.01536 -0.11883 -0.01159)
      PathWrap: wrap_object=deltoid
    Schutte1993Muscle delt_clav_3: max_isometric_force=105 optimal_fiber_length=0.0824 tendon_slack_length=0.067
        pennation_angle=0.08726646 activation1=79.16934 activation2=23.92344 mass=0.00983
      PathPoint: clavicle_r (0.13429 0.02229 0.00073)
      PathPoint: humerus_r (0.01673 -0.09943 -0.0097)
      PathWrap: wrap_object=deltoid
    Schutte1993Muscle delt_clav_4: max_isometric_force=112 optimal_fiber_length=0.0991 tendon_slack_length=0.073
        pennation_angle=0.08726646 activation1=79.16934 activation2=23.92344 mass=0.01259
      PathPoint: clavicle_r (0.13196 0.01641 0.00086)
      PathPoint: humerus_r (0.01536 -0.11883 -0.01159)
      PathWrap: wrap_object=deltoid
    Schutte1993Muscle coracobr_1: max_isometric_force=201 optimal_fiber_length=0.066 tendon_slack_length=0.092
        pennation_angle=0 activation1=79.16934 activation2=23.92344 mass=0.01506
      PathPoint: scapula_r (-0.00808 -0.0086 -0.07655)
      PathPoint: humerus_r (-0.00267 -0.14632 -0.00771)
    Schutte1993Muscle coracobr_2: max_isometric_force=148 optimal_fiber_length=0.0683 tendon_slack_length=0.104
        pennation_angle=0 activation1=133.3534 activation2=30.58104 mass=0.01151
      PathPoint: scapula_r (-0.01352 -0.01494 -0.07857)
      PathPoint: humerus_r (-0.00764 -0.16485 -0.00176)
    Schutte1993Muscle coracobr_3: max_isometric_force=114 optimal_fiber_length=0.0727 tendon_slack_length=0.113
        pennation_angle=0 activation1=133.3534 activation2=30.58104 mass=0.00939
      PathPoint: scapula_r (-0.00927 -0.00819 -0.0826)
      PathPoint: humerus_r (-0.00534 -0.17394 -0.00556)
    Schutte1993Muscle infra_1: max_isometric_force=272 optimal_fiber_length=0.0633 tendon_slack_length=0.038
        pennation_angle=0 activation1=133.3534 activation2=30.58104 mass=0.01961
      PathPoint: scapula_r (-0.06093 -0.04183 -0.019)
      PathPoint: humerus_r (0.01994 0.00982 0.01257)
      PathWrap: wrap_object=infra_cyl
    Schutte1993Muscle infra_2: max_isometric_force=275 optimal_fiber_length=0.0719 tendon_slack_length=0.107
        pennation_angle=0 activation1=133.3534 activation2=30.58104 mass=0.02245
      PathPoint: scapula_r (-0.12606 -0.09226 0.00115)
      PathPoint: humerus_r (0.01835 0.016 0.00691)
      PathWrap: wrap_object=infra_cyl
    Schutte1993Muscle infra_3: max_isometric_force=194 optimal_fiber_length=0.0677 tendon_slack_length=0.084
        pennation_angle=0 activation1=133.3534 activation2=30.58104 mass=0.01488
      PathPoint: scapula_r (-0.1077 -0.07258 0.00057)
      PathPoint: humerus_r (0.01835 0.016 0.00691)
      PathWrap: wrap_object=infra_cyl
    Schutte1993Muscle infra_4: max_isometric_force=207 optimal_fiber_length=0.0693 tendon_slack_length=0.071
        pennation_angle=0 activation1=133.3534 activation2=30.58104 mass=0.01631
      PathPoint: scapula_r (-0.10911 -0.04946 -0.00122)
      PathPoint: humerus_r (0.01605 0.01912 0.00704)
      PathWrap: wrap_object=infra_cyl
    Schutte1993Muscle infra_5: max_isometric_force=302 optimal_fiber_length=0.0698 tendon_slack_length=0.05
        pennation_angle=0 activation1=82.95686 activation2=24.57002 mass=0.02414
      PathPoint: scapula_r (-0.10439 -0.01708 -0.01072)
      PathPoint: humerus_r (0.01605 0.01912 0.00704)
      PathWrap: wrap_object=infra_cyl
    Schutte1993Muscle infra_6: max_isometric_force=182 optimal_fiber_length=0.0753 tendon_slack_length=0.035
        pennation_angle=0 activation1=82.95686 activation2=24.57002 mass=0.01564
      PathPoint: scapula_r (-0.0807 -0.00038 0.00044)
      PathPoint: humerus_r (0.01917 0.01274 0.00836)
      PathWrap: wrap_object=infra_cyl
    Schutte1993Muscle ter_min_1: max_isometric_force=122 optimal_fiber_length=0.0501 tendon_slack_length=0.049
        pennation_angle=0 activation1=82.95686 activation2=24.57002 mass=0.00714
      PathPoint: scapula_r (-0.0557 -0.0665 -0.01405)
      PathPoint: humerus_r (0.02578 -0.00703 0.0088)
      PathWrap: wrap_object=ter_min_cyl
    Schutte1993Muscle ter_min_2: max_isometric_force=195 optimal_fiber_length=0.055 tendon_slack_length=0.051
        pennation_angle=0 activation1=82.95686 activation2=24.57002 mass=0.01221
      PathPoint: scapula_r (-0.06585 -0.06908 -0.00647)
      PathPoint: humerus_r (0.02808 -0.00124 0.008)
      PathWrap: wrap_object=ter_min_cyl
    Schutte1993Muscle ter_min_3: max_isometric_force=180 optimal_fiber_length=0.0506 tendon_slack_length=0.018
        pennation_angle=0 activation1=82.95686 activation2=24.57002 mass=0.01041
      PathPoint: scapula_r (-0.03809 -0.04208 -0.01695)
      PathPoint: humerus_r (0.02578 -0.00703 0.0088)
      PathWrap: wrap_object=ter_min_cyl
    Schutte1993Muscle ter_maj_1: max_isometric_force=165 optimal_fiber_length=0.1411 tendon_slack_length=0.006
        pennation_angle=0 activation1=82.95686 activation2=24.57002 mass=0.02643
      PathPoint: scapula_r (-0.08743 -0.10492 -0.0131)
      PathPoint: humerus_r (-0.00601 -0.06556 -0.00941)
      PathWrap: wrap_object=ter_lat_pec
    Schutte1993Muscle ter_maj_2: max_isometric_force=85 optimal_fiber_length=0.1595 tendon_slack_length=0.012
        pennation_angle=0 activation1=98.40426 activation2=26.59574 mass=0.01549
      PathPoint: scapula_r (-0.10274 -0.11248 -0.01045)
      PathPoint: humerus_r (-0.00286 -0.08427 -0.00946)
      PathWrap: wrap_object=ter_lat_pec
    Schutte1993Muscle ter_maj_3: max_isometric_force=200 optimal_fiber_length=0.1526 tendon_slack_length=0.015
        pennation_angle=0 activation1=98.40426 activation2=26.59574 mass=0.03481
      PathPoint: scapula_r (-0.09123 -0.09007 0.00009)
      PathPoint: humerus_r (-0.0038 -0.07838 -0.00899)
      PathWrap: wrap_object=ter_lat_pec
    Schutte1993Muscle ter_maj_4: max_isometric_force=158 optimal_fiber_length=0.1093 tendon_slack_length=0.034
        pennation_angle=0 activation1=98.40426 activation2=26.59574 mass=0.01971
      PathPoint: scapula_r (-0.07965 -0.09549 -0.01112)
      PathPoint: humerus_r (-0.00652 -0.04977 -0.01067)
      PathWrap: wrap_object=ter_lat_pec
    Schutte1993Muscle supra_1: max_isometric_force=120 optimal_fiber_length=0.0541 tendon_slack_length=0.017
        pennation_angle=0 activation1=98.40426 activation2=26.59574 mass=0.0074
      PathPoint: scapula_r (-0.06032 0.00324 -0.01859)
      PathPoint: humerus_r (0.0232 0.01256 0.00267)
      PathWrap: wrap_object=inf_sup_sub
    Schutte1993Muscle supra_2: max_isometric_force=113 optimal_fiber_length=0.0591 tendon_slack_length=0.025
        pennation_angle=0 activation1=98.40426 activation2=26.59574 mass=0.00756
      PathPoint: scapula_r (-0.05964 0.01101 -0.00694)
      PathPoint: humerus_r (0.0232 0.01256 0.00267)
      PathWrap: wrap_object=inf_sup_sub
    Schutte1993Muscle supra_3: max_isometric_force=258 optimal_fiber_length=0.0564 tendon_slack_length=0.052
        pennation_angle=0 activation1=98.40426 activation2=26.59574 mass=0.01651
      PathPoint: scapula_r (-0.09439 0.02104 -0.02501)
      PathPoint: humerus_r (0.01229 0.01923 -0.01372)
      PathWrap: wrap_object=inf_sup_sub
    Schutte1993Muscle supra_4: max_isometric_force=130 optimal_fiber_length=0.0554 tendon_slack_length=0.031
        pennation_angle=0 activation1=63.46917 activation2=21.2766 mass=0.00819
      PathPoint: scapula_r (-0.07385 0.0212 -0.04032)
      PathPoint: humerus_r (0.01229 0.01923 -0.01372)
      PathWrap: wrap_object=inf_sup_sub
    Schutte1993Muscle subscap_1: max_isometric_force=44 optimal_fiber_length=0.0556 tendon_slack_length=0.028
        pennation_angle=0 activation1=63.46917 activation2=21.2766 mass=0.00281
      PathPoint: scapula_r (-0.06191 -0.01317 -0.02286)
      PathPoint: humerus_r (-0.0179 0.0122 -0.0149)
      PathPoint: humerus_r (-0.00294 0.01654 -0.01923)
      PathWrap: wrap_object=inf_sup_sub
    Schutte1993Muscle subscap_2: max_isometric_force=78 optimal_fiber_length=0.0649 tendon_slack_length=0.044
        pennation_angle=0 activation1=63.46917 activation2=21.2766 mass=0.00575
      PathPoint: scapula_r (-0.08371 0.01198 -0.02805)
      PathPoint: humerus_r (-0.0199 0.0136 -0.011)
      PathPoint: humerus_r (-0.00052 0.01294 -0.02164)
      PathWrap: wrap_object=inf_sup_sub
    Schutte1993Muscle subscap_3: max_isometric_force=264 optimal_fiber_length=0.0676 tendon_slack_length=0.059
        pennation_angle=0.08726646 activation1=63.46917 activation2=21.2766 mass=0.02021
      PathPoint: scapula_r (-0.10494 -0.01449 -0.01421)
      PathPoint: humerus_r (-0.0079 0.0153 -0.0192)
      PathPoint: humerus_r (-0.00294 0.01654 -0.01923)
      PathWrap: wrap_object=inf_sup_sub
    Schutte1993Muscle subscap_4: max_isometric_force=274 optimal_fiber_length=0.0744 tendon_slack_length=0.055
        pennation_angle=0.08726646 activation1=63.46917 activation2=21.2766 mass=0.02376
      PathPoint: scapula_r (-0.09383 -0.04361 -0.008)
      PathPoint: humerus_r (0.00035 0.00641 -0.02488)
      PathWrap: wrap_object=inf_sup_sub
    Schutte1993Muscle subscap_5: max_isometric_force=114 optimal_fiber_length=0.0797 tendon_slack_length=0.066
        pennation_angle=0 activation1=63.46917 activation2=21.2766 mass=0.01033
      PathPoint: scapula_r (-0.08744 -0.05705 -0.01224)
      PathPoint: humerus_r (0.00434 0.00857 -0.02458)
      PathWrap: wrap_object=inf_sup_sub
    Schutte1993Muscle subscap_6: max_isometric_force=149 optimal_fiber_length=0.0762 tendon_slack_length=0.077
        pennation_angle=0 activation1=78.28785 activation2=23.75297 mass=0.01292
      PathPoint: scapula_r (-0.10583 -0.07907 -0.00359)
      PathPoint: humerus_r (0.00177 0.00229 -0.02803)
      PathWrap: wrap_object=inf_sup_sub
    Schutte1993Muscle subscap_7: max_isometric_force=162 optimal_fiber_length=0.082 tendon_slack_length=0.079
        pennation_angle=0 activation1=78.28785 activation2=23.75297 mass=0.01513
      PathPoint: scapula_r (-0.09986 -0.09466 -0.01007)
      PathPoint: humerus_r (-0.00244 0.00087 -0.02664)
      PathWrap: wrap_object=inf_sup_sub
    Schutte1993Muscle subscap_8: max_isometric_force=61 optimal_fiber_length=0.0765 tendon_slack_length=0.04
        pennation_angle=0 activation1=112.5165 activation2=28.32861 mass=0.00532
      PathPoint: scapula_r (-0.06847 -0.06545 -0.01992)
      PathPoint: humerus_r (-0.00244 0.00087 -0.02664)
      PathWrap: wrap_object=inf_sup_sub
    Schutte1993Muscle subscap_9: max_isometric_force=222 optimal_fiber_length=0.0721 tendon_slack_length=0.059
        pennation_angle=0 activation1=112.5165 activation2=28.32861 mass=0.0182
      PathPoint: scapula_r (-0.07975 -0.0921 -0.01229)
      PathPoint: humerus_r (-0.00657 -0.00374 -0.02331)
      PathWrap: wrap_object=inf_sup_sub
    Schutte1993Muscle subscap10: max_isometric_force=47 optimal_fiber_length=0.0676 tendon_slack_length=0.01
        pennation_angle=0 activation1=45.41056 activation2=17.48252 mass=0.00361
      PathPoint: scapula_r (-0.04636 -0.05426 -0.02109)
      PathPoint: humerus_r (-0.00741 -0.01704 -0.01554)
      PathWrap: wrap_object=inf_sup_sub
    Schutte1993Muscle subscap11: max_isometric_force=16 optimal_fiber_length=0.0643 tendon_slack_length=0.001
        pennation_angle=0 activation1=45.41056 activation2=17.48252 mass=0.00115
      PathPoint: scapula_r (-0.03613 -0.04567 -0.02881)
      PathPoint: humerus_r (-0.00974 -0.02286 -0.01025)
      PathWrap: wrap_object=inf_sup_sub
    Schutte1993Muscle bic_l: max_isometric_force=347 optimal_fiber_length=0.1292 tendon_slack_length=0.2335
        pennation_angle=0 activation1=45.41056 activation2=17.48252 mass=0.0662
      PathPoint: scapula_r (-0.01401 -0.00249 -0.04288)
      PathPoint: humerus_r (0.0217 0.0001 -0.0011)
      PathPoint: radius_r (-0.00282 -0.03609 -0.01072)
      PathWrap: wrap_object=inf_sup_sub
      PathWrap: wrap_object=radius
    Schutte1993Muscle bic_b_1: max_isometric_force=173 optimal_fiber_length=0.117 tendon_slack_length=0.1913
        pennation_angle=0 activation1=45.41056 activation2=17.48252 mass=0.02079
      PathPoint: scapula_r (-0.00915 -0.00833 -0.08244)
      PathPoint: radius_r (-0.00282 -0.03609 -0.01072)
      PathWrap: wrap_object=radius
    Schutte1993Muscle bic_b_2: max_isometric_force=322 optimal_fiber_length=0.1149 tendon_slack_length=0.1927
        pennation_angle=0 activation1=45.41056 activation2=17.48252 mass=0.03107
      PathPoint: scapula_r (-0.00915 -0.00833 -0.08244)
      PathPoint: radius_r (-0.00282 -0.03609 -0.01072)
      PathWrap: wrap_object=radius
    Schutte1993Muscle tric_l_1: max_isometric_force=223 optimal_fiber_length=0.1008 tendon_slack_length=0.2041
        pennation_angle=0.1745329 activation1=62.32493 activation2=21.0084 mass=0.02697
      PathPoint: ulna_r (-0.01819 -0.01616 0.01247)
      PathPoint: scapula_r (-0.03222 -0.04378 -0.02056)
      PathWrap: wrap_object=elbow
    Schutte1993Muscle tric_l_2: max_isometric_force=296 optimal_fiber_length=0.0881 tendon_slack_length=0.2193
        pennation_angle=0.1745329 activation1=62.32493 activation2=21.0084 mass=0.02955
      PathPoint: ulna_r (-0.00519 -0.01833 0.00596)
      PathPoint: scapula_r (-0.02425 -0.04193 -0.03744)
      PathWrap: wrap_object=elbow
    Schutte1993Muscle tric_l_3: max_isometric_force=283 optimal_fiber_length=0.1183 tendon_slack_length=0.218
        pennation_angle=0.1745329 activation1=62.32493 activation2=21.0084 mass=0.02964
      PathPoint: ulna_r (-0.00261 -0.04828 0.00593)
      PathPoint: scapula_r (-0.02254 -0.03911 -0.02787)
      PathWrap: wrap_object=elbow
    Schutte1993Muscle tric_l_4: max_isometric_force=327 optimal_fiber_length=0.1226 tendon_slack_length=0.2197
        pennation_angle=0 activation1=62.32493 activation2=21.0084 mass=0.03203
      PathPoint: ulna_r (-0.00029 -0.0445 0.00102)
      PathPoint: scapula_r (-0.02425 -0.04193 -0.03744)
      PathWrap: wrap_object=elbow
    Schutte1993Muscle lat_dorsi_1: max_isometric_force=56 optimal_fiber_length=0.2343 tendon_slack_length=0.09
        pennation_angle=0 activation1=62.32493 activation2=21.0084 mass=0.01498
      PathPoint: thorax (0.0098 -0.126 0.1526)
      PathPoint: humerus_r (0.00138 -0.03789 -0.01764)
      PathWrap: wrap_object=ter_lat_pec
    Schutte1993Muscle lat_dorsi_2: max_isometric_force=88 optimal_fiber_length=0.2857 tendon_slack_length=0.083
        pennation_angle=0 activation1=62.32493 activation2=21.0084 mass=0.02883
      PathPoint: thorax (0.013 -0.1967 0.1482)
      PathPoint: humerus_r (0.00213 -0.04447 -0.01724)
      PathWrap: wrap_object=ter_lat_pec
    Schutte1993Muscle lat_dorsi_3: max_isometric_force=129 optimal_fiber_length=0.2951 tendon_slack_length=0.105
        pennation_angle=0 activation1=62.32493 activation2=21.0084 mass=0.04305
      PathPoint: thorax (0.0116 -0.2515 0.1392)
      PathPoint: humerus_r (0.00213 -0.04447 -0.01724)
      PathWrap: wrap_object=ter_lat_pec
    Schutte1993Muscle lat_dorsi_4: max_isometric_force=96 optimal_fiber_length=0.3206 tendon_slack_length=0.12
        pennation_angle=0 activation1=62.32493 activation2=21.0084 mass=0.03515
      PathPoint: thorax (0.0211 -0.3109 0.128)
      PathPoint: humerus_r (0.00138 -0.03789 -0.01764)
      PathWrap: wrap_object=ter_lat_pec
    Schutte1993Muscle lat_dorsi_5: max_isometric_force=88 optimal_fiber_length=0.3129 tendon_slack_length=0.072
        pennation_angle=0 activation1=62.32493 activation2=21.0084 mass=0.03157
      PathPoint: thorax (0.0792 -0.3084 0.0992)
      PathPoint: humerus_r (0.00138 -0.03789 -0.01764)
      PathWrap: wrap_object=ter_lat_pec
    Schutte1993Muscle lat_dorsi_6: max_isometric_force=105 optimal_fiber_length=0.3402 tendon_slack_length=0.069
        pennation_angle=0 activation1=62.32493 activation2=21.0084 mass=0.04069
      PathPoint: thorax (0.1042 -0.2978 0.0851)
      PathPoint: humerus_r (0.00213 -0.04447 -0.01724)
      PathWrap: wrap_object=ter_lat_pec
    Schutte1993Muscle pect_maj_t_1: max_isometric_force=125 optimal_fiber_length=0.1884 tendon_slack_length=0.036
        pennation_angle=0 activation1=63.46917 activation2=21.2766 mass=0.02692
      PathPoint: thorax (0.0612 -0.1574 -0.0321)
      PathPoint: humerus_r (0.01035 -0.0631 -0.01727)
      PathWrap: wrap_object=ter_lat_pec
    Schutte1993Muscle pect_maj_t_2: max_isometric_force=118 optimal_fiber_length=0.183 tendon_slack_length=0.043
        pennation_angle=0 activation1=78.28785 activation2=23.75297 mass=0.02448
      PathPoint: thorax (0.0279 -0.1403 -0.0392)
      PathPoint: humerus_r (0.01089 -0.06875 -0.01702)
      PathWrap: wrap_object=ter_lat_pec
    Schutte1993Muscle pect_maj_t_3: max_isometric_force=165 optimal_fiber_length=0.1853 tendon_slack_length=0.053
        pennation_angle=0 activation1=78.28785 activation2=23.75297 mass=0.03475
      PathPoint: thorax (0.0084 -0.1223 -0.0348)
      PathPoint: humerus_r (0.01078 -0.0738 -0.01675)
      PathWrap: wrap_object=ter_lat_pec
    Schutte1993Muscle pect_maj_t_4: max_isometric_force=157 optimal_fiber_length=0.1833 tendon_slack_length=0.028
        pennation_angle=0 activation1=112.5165 activation2=28.32861 mass=0.03301
      PathPoint: thorax (0.0132 -0.1006 -0.0372)
      PathPoint: humerus_r (0.01111 -0.06428 -0.01752)
      PathWrap: wrap_object=ter_lat_pec
    Schutte1993Muscle pect_maj_t_5: max_isometric_force=133 optimal_fiber_length=0.15 tendon_slack_length=0.026
        pennation_angle=0 activation1=112.5165 activation2=28.32861 mass=0.02273
      PathPoint: thorax (0.0071 -0.0418 -0.019)
      PathPoint: humerus_r (0.01112 -0.05418 -0.01808)
      PathWrap: wrap_object=ter_lat_pec
    Schutte1993Muscle pect_maj_t_6: max_isometric_force=198 optimal_fiber_length=0.1449 tendon_slack_length=0.036
        pennation_angle=0 activation1=45.41056 activation2=17.48252 mass=0.03243
      PathPoint: thorax (0.0116 -0.0227 -0.0061)
      PathPoint: humerus_r (0.01111 -0.06428 -0.01752)
      PathWrap: wrap_object=ter_lat_pec
    Schutte1993Muscle pect_maj_c_1: max_isometric_force=179 optimal_fiber_length=0.1363 tendon_slack_length=0.017
        pennation_angle=0 activation1=45.41056 activation2=17.48252 mass=0.02769
      PathPoint: clavicle_r (0.06298 0.01075 -0.01636)
      PathPoint: humerus_r (0.01184 -0.08869 -0.01555)
      PathWrap: wrap_object=ter_lat_pec
    Schutte1993Muscle pect_maj_c_2: max_isometric_force=113 optimal_fiber_length=0.1091 tendon_slack_length=0.014
        pennation_angle=0 activation1=45.41056 activation2=17.48252 mass=0.01399
      PathPoint: clavicle_r (0.08276 0.01309 -0.01496)
      PathPoint: humerus_r (0.01112 -0.05418 -0.01808)
      PathWrap: wrap_object=ter_lat_pec
    Schutte1993Muscle tric_med_1: max_isometric_force=263 optimal_fiber_length=0.0807 tendon_slack_length=0.0875
        pennation_angle=0.296706 activation1=45.41056 activation2=17.48252 mass=0.0184
      PathPoint: humerus_r (-0.00714 -0.14854 -0.00007)
      PathPoint: ulna_r (-0.01561 -0.00771 0.02364)
      PathWrap: wrap_object=elbow
    Schutte1993Muscle tric_med_2: max_isometric_force=256 optimal_fiber_length=0.0773 tendon_slack_length=0.1122
        pennation_angle=0 activation1=62.32493 activation2=21.0084 mass=0.01765
      PathPoint: humerus_r (-0.00622 -0.12402 0.00296)
      PathPoint: ulna_r (-0.01561 -0.00771 0.02364)
      PathWrap: wrap_object=elbow
    Schutte1993Muscle tric_med_3: max_isometric_force=240 optimal_fiber_length=0.0602 tendon_slack_length=0.0107
        pennation_angle=0 activation1=62.32493 activation2=21.0084 mass=0.01195
      PathPoint: humerus_r (0.00936 -0.24184 0.01321)
      PathPoint: ulna_r (-0.01561 -0.00771 0.02364)
      PathWrap: wrap_object=elbow
    Schutte1993Muscle tric_med_4: max_isometric_force=211 optimal_fiber_length=0.0746 tendon_slack_length=0.0404
        pennation_angle=0.1396263 activation1=62.32493 activation2=21.0084 mass=0.01395
      PathPoint: humerus_r (0.00264 -0.19989 0.01615)
      PathPoint: ulna_r (-0.01561 -0.00771 0.02364)
      PathWrap: wrap_object=elbow
    Schutte1993Muscle tric_med_5: max_isometric_force=107 optimal_fiber_length=0.0807 tendon_slack_length=0.0738
        pennation_angle=0 activation1=62.32493 activation2=21.0084 mass=0.0077
      PathPoint: humerus_r (-0.0058 -0.15646 0.00909)
      PathPoint: ulna_r (-0.01561 -0.00771 0.02364)
      PathWrap: wrap_object=elbow
    Schutte1993Muscle brachialis_1: max_isometric_force=314 optimal_fiber_length=0.0876 tendon_slack_length=0.0807
        pennation_angle=0 activation1=62.32493 activation2=21.0084 mass=0.0291
      PathPoint: humerus_r (0.00954 -0.14854 0.00625)
      PathPoint: ulna_r (-0.01536 -0.04443 -0.0061)
      PathWrap: wrap_object=elbow_circ
    Schutte1993Muscle brachialis_2: max_isometric_force=158 optimal_fiber_length=0.0953 tendon_slack_length=0.0592
        pennation_angle=0 activation1=62.32493 activation2=21.0084 mass=0.0159
      PathPoint: humerus_r (-0.00285 -0.154 -0.00517)
      PathPoint: ulna_r (-0.01911 -0.04206 -0.00329)
      PathWrap: wrap_object=elbow_circ
    Schutte1993Muscle brachialis_3: max_isometric_force=157 optimal_fiber_length=0.087 tendon_slack_length=0.0394
        pennation_angle=0 activation1=62.32493 activation2=21.0084 mass=0.01465
      PathPoint: humerus_r (-0.0087 -0.18035 -0.00033)
      PathPoint: ulna_r (-0.02492 -0.03076 -0.00037)
      PathWrap: wrap_object=elbow_circ
    Schutte1993Muscle brachialis_4: max_isometric_force=87 optimal_fiber_length=0.0758 tendon_slack_length=0.0317
        pennation_angle=0 activation1=62.32493 activation2=21.0084 mass=0.007
      PathPoint: humerus_r (-0.00018 -0.19078 -0.00104)
      PathPoint: ulna_r (-0.01581 -0.04166 -0.0046)
      PathWrap: wrap_object=elbow_circ
    Schutte1993Muscle brachialis_5: max_isometric_force=101 optimal_fiber_length=0.0619 tendon_slack_length=0.0209
        pennation_angle=0 activation1=62.32493 activation2=21.0084 mass=0.0066
      PathPoint: humerus_r (-0.01268 -0.22134 0.00514)
      PathPoint: ulna_r (-0.02218 -0.03756 -0.00186)
      PathWrap: wrap_object=elbow_circ
    Schutte1993Muscle brachialis_6: max_isometric_force=104 optimal_fiber_length=0.0472 tendon_slack_length=0.035
        pennation_angle=0 activation1=62.32493 activation2=21.0084 mass=0.0041
      PathPoint: humerus_r (-0.00198 -0.22967 0.00021)
      PathPoint: ulna_r (-0.02445 -0.03273 -0.00283)
      PathWrap: wrap_object=elbow_circ
    Schutte1993Muscle brachialis_7: max_isometric_force=118 optimal_fiber_length=0.0621 tendon_slack_length=0.0076
        pennation_angle=0 activation1=62.32493 activation2=21.0084 mass=0.0065
      PathPoint: humerus_r (-0.01261 -0.2366 0.00399)
      PathPoint: ulna_r (-0.01286 -0.03966 -0.00573)
      PathWrap: wrap_object=elbow_circ
    Schutte1993Muscle brachiorad_1: max_isometric_force=30 optimal_fiber_length=0.1613 tendon_slack_length=0.1197
        pennation_angle=0 activation1=62.32493 activation2=21.0084 mass=0.0047
      PathPoint: humerus_r (0.00282 -0.19968 0.00875)
      PathPoint: radius_r (0.00812 -0.22513 -0.07037)
    Schutte1993Muscle brachiorad_2: max_isometric_force=82 optimal_fiber_length=0.1613 tendon_slack_length=0.1197
        pennation_angle=0 activation1=62.32493 activation2=21.0084 mass=0.014
      PathPoint: humerus_r (0.00446 -0.2175 0.01532)
      PathPoint: radius_r (0.00812 -0.22513 -0.07037)
    Schutte1993Muscle brachiorad_3: max_isometric_force=52 optimal_fiber_length=0.1066 tendon_slack_length=0.1542
        pennation_angle=0 activation1=62.32493 activation2=21.0084 mass=0.00597
      PathPoint: humerus_r (0.006 -0.2343 0.01649)
      PathPoint: radius_r (0.00812 -0.22513 -0.07037)
    Schutte1993Muscle pron_teres_1: max_isometric_force=510 optimal_fiber_length=0.061 tendon_slack_length=0.0851
        pennation_angle=0 activation1=62.32493 activation2=21.0084 mass=0.0275
      PathPoint: humerus_r (-0.03769 -0.27686 0.00635)
      PathPoint: radius_r (0.02077 -0.10531 0.00781)
      PathPoint: radius_r (0.02077 -0.10531 0.00782)
      PathWrap: wrap_object=ulna_radius
    Schutte1993Muscle pron_teres_2: max_isometric_force=141 optimal_fiber_length=0.0391 tendon_slack_length=0.0484
        pennation_angle=0 activation1=62.32493 activation2=21.0084 mass=0.00433
      PathPoint: ulna_r (-0.0122 -0.02454 -0.01563)
      PathPoint: radius_r (0.02229 -0.08157 0.00341)
      PathWrap: wrap_object=ulna_radius
    Schutte1993Muscle supinator_1: max_isometric_force=47 optimal_fiber_length=0.0267 tendon_slack_length=0.0254
        pennation_angle=0 activation1=62.32493 activation2=21.0084 mass=0.00084
      PathPoint: ulna_r (0.02112 -0.08347 -0.00882)
      PathPoint: radius_r (0.0181 -0.08131 0.00588)
      PathWrap: wrap_object=supinator
    Schutte1993Muscle supinator_2: max_isometric_force=232 optimal_fiber_length=0.026 tendon_slack_length=0.0231
        pennation_angle=0 activation1=62.32493 activation2=21.0084 mass=0.00364
      PathPoint: ulna_r (0.0211 -0.0668 -0.0086)
      PathPoint: radius_r (0.0185 -0.0678 0.0062)
      PathWrap: wrap_object=supinator
    Schutte1993Muscle supinator_3: max_isometric_force=126 optimal_fiber_length=0.0252 tendon_slack_length=0.015
        pennation_angle=0 activation1=62.32493 activation2=21.0084 mass=0.00336
      PathPoint: ulna_r (0.02052 -0.05021 -0.00886)
      PathPoint: radius_r (0.01785 -0.05686 0.00441)
      PathWrap: wrap_object=supinator
    Schutte1993Muscle supinator_4: max_isometric_force=148 optimal_fiber_length=0.0263 tendon_slack_length=0.0145
        pennation_angle=0 activation1=62.32493 activation2=21.0084 mass=0.00296
      PathPoint: ulna_r (0.0193 -0.04058 -0.00751)
      PathPoint: radius_r (0.01614 -0.0485 0.00112)
      PathWrap: wrap_object=supinator
    Schutte1993Muscle supinator_5: max_isometric_force=285 optimal_fiber_length=0.0274 tendon_slack_length=0.0139
        pennation_angle=0.03490659 activation1=62.32493 activation2=21.0084 mass=0.00676
      PathPoint: ulna_r (0.01794 -0.03097 -0.00612)
      PathPoint: radius_r (0.01434 -0.04015 -0.00211)
      PathWrap: wrap_object=supinator
    Schutte1993Muscle pron_quad_1: max_isometric_force=73 optimal_fiber_length=0.0377 tendon_slack_length=0.001
        pennation_angle=0 activation1=62.32493 activation2=21.0084 mass=0.00163
      PathPoint: radius_r (0.01513 -0.20699 -0.01734)
      PathPoint: ulna_r (0.02616 -0.19942 -0.05486)
      PathWrap: wrap_object=pron_quad
    Schutte1993Muscle pron_quad_2: max_isometric_force=178 optimal_fiber_length=0.0386 tendon_slack_length=0.001
        pennation_angle=0 activation1=62.32493 activation2=21.0084 mass=0.00347
      PathPoint: radius_r (0.0165 -0.21195 -0.01749)
      PathPoint: ulna_r (0.03146 -0.21573 -0.06108)
      PathWrap: wrap_object=pron_quad
    Schutte1993Muscle pron_quad_3: max_isometric_force=219 optimal_fiber_length=0.0352 tendon_slack_length=0.001
        pennation_angle=0 activation1=62.32493 activation2=21.0084 mass=0.00493
      PathPoint: radius_r (0.0174 -0.22071 -0.02229)
      PathPoint: ulna_r (0.03432 -0.22684 -0.06487)
      PathWrap: wrap_object=pron_quad
    Schutte1993Muscle tric_lat_1: max_isometric_force=153 optimal_fiber_length=0.0758 tendon_slack_length=0.1707
        pennation_angle=0 activation1=62.32493 activation2=21.0084 mass=0.0125
      PathPoint: humerus_r (0.00631 -0.05495 0.011)
      PathPoint: ulna_r (-0.01587 0.00793 0.0209)
      PathWrap: wrap_object=elbow
    Schutte1993Muscle tric_lat_2: max_isometric_force=410 optimal_fiber_length=0.0766 tendon_slack_length=0.177
        pennation_angle=0.08726646 activation1=62.32493 activation2=21.0084 mass=0.0332
      PathPoint: humerus_r (0.00631 -0.05495 0.011)
      PathPoint: ulna_r (-0.01498 0.0054 0.0221)
      PathWrap: wrap_object=elbow
    Schutte1993Muscle tric_lat_3: max_isometric_force=219 optimal_fiber_length=0.0656 tendon_slack_length=0.1911
        pennation_angle=0.1745329 activation1=62.32493 activation2=21.0084 mass=0.0152
      PathPoint: humerus_r (0.00631 -0.05495 0.011)
      PathPoint: ulna_r (-0.0058 0 0.02015)
      PathWrap: wrap_object=elbow
    Schutte1993Muscle tric_lat_4: max_isometric_force=275 optimal_fiber_length=0.0638 tendon_slack_length=0.157
        pennation_angle=0.1745329 activation1=62.32493 activation2=21.0084 mass=0.0162
      PathPoint: humerus_r (0.01211 -0.09512 0.01048)
      PathPoint: ulna_r (-0.0058 0 0.02015)
      PathWrap: wrap_object=elbow
    Schutte1993Muscle tric_lat_5: max_isometric_force=87 optimal_fiber_length=0.0638 tendon_slack_length=0.157
        pennation_angle=0.296706 activation1=62.32493 activation2=21.0084 mass=0.00585
      PathPoint: humerus_r (0.01211 -0.09512 0.01048)
      PathPoint: ulna_r (-0.00814 0.00406 0.01884)
      PathWrap: wrap_object=elbow
    Schutte1993Muscle anconeus_1: max_isometric_force=31 optimal_fiber_length=0.0252 tendon_slack_length=0.0064
        pennation_angle=0 activation1=62.32493 activation2=21.0084 mass=0.00083
      PathPoint: humerus_r (0.01337 -0.29227 0.01291)
      PathPoint: ulna_r (0.0065 -0.02074 0.01047)
    Schutte1993Muscle anconeus_2: max_isometric_force=70 optimal_fiber_length=0.0202 tendon_slack_length=0.008
        pennation_angle=0.2617994 activation1=62.32493 activation2=21.0084 mass=0.0015
      PathPoint: humerus_r (0.01153 -0.29614 0.01149)
      PathPoint: ulna_r (0.00769 -0.02394 0.00924)
    Schutte1993Muscle anconeus_3: max_isometric_force=25 optimal_fiber_length=0.0228 tendon_slack_length=0.0043
        pennation_angle=0 activation1=62.32493 activation2=21.0084 mass=0.0006
      PathPoint: humerus_r (0.01201 -0.28689 0.01448)
      PathPoint: ulna_r (0.0053 -0.01763 0.01169)
    Schutte1993Muscle anconeus_4: max_isometric_force=118 optimal_fiber_length=0.027 tendon_slack_length=0.03
        pennation_angle=0.3141593 activation1=62.32493 activation2=21.0084 mass=0.0022
      PathPoint: humerus_r (0.01592 -0.29678 0.00632)
      PathPoint: ulna_r (0.0153 -0.05532 0.00283)
    Schutte1993Muscle anconeus_5: max_isometric_force=118 optimal_fiber_length=0.0266 tendon_slack_length=0.02
        pennation_angle=0.4014257 activation1=62.32493 activation2=21.0084 mass=0.00333
      PathPoint: humerus_r (0.01446 -0.29765 0.00818)
      PathPoint: ulna_r (0.0109 -0.04041 0.00689)
  BodySet:
    Body ground: mass=0 mass_center=(0 0 0) inertia_xx=0 inertia_yy=0 inertia_zz=0
    Body thorax: mass=20 mass_center=(0 -0.1486 0.0591) inertia_xx=1.29841 inertia_yy=0.55245 inertia_zz=1.29841
      WeldJoint base: parent_body=ground location_in_parent=(0 0 0) location=(0 0 0)
      WrapEllipsoid serr_ant: dimensions=(0.147 0.2079 0.0944) translation=(0 -0.1486 0.0591)
    Body clavicle_1: mass=0 mass_center=(0 0 0) inertia_xx=0 inertia_yy=0 inertia_zz=0
      WeldJoint sc1: parent_body=thorax location_in_parent=(0.0014 -0.0152 0.0028)
          orientation_in_parent=(0 -0.3829252 0) location=(0 0 0)
    Body clavicle_2: mass=0 mass_center=(0 0 0) inertia_xx=0 inertia_yy=0 inertia_zz=0
      WeldJoint sc2: parent_body=clavicle_1 location_in_parent=(0 0 0) orientation_in_parent=(0 0 0.1068491)
          location=(0 0 0)
    Body clavicle_r: mass=0.156 mass_center=(0.0983 0.0167 0.0042) inertia_xx=0.0000064 inertia_yy=0.0000263
        inertia_zz=0.0000243 inertia_xy=-0.0000067 inertia_xz=-0.0000095 inertia_yz=0.0000029 meshes=rclavicle.vtp
      WeldJoint sc3: parent_body=clavicle_2 location_in_parent=(0 0 0) orientation_in_parent=(0.001733967 0 0)
          location=(0 0 0)
    Body scapula_1: mass=0 mass_center=(0 0 0) inertia_xx=0 inertia_yy=0 inertia_zz=0
      WeldJoint ac1: parent_body=clavicle_r location_in_parent=(0.2077 -0.0001 0.0282)
          orientation_in_parent=(0 0.6213967 0) location=(0 0 0)
    Body scapula_2: mass=0 mass_center=(0 0 0) inertia_xx=0 inertia_yy=0 inertia_zz=0
      WeldJoint ac2: parent_body=scapula_1 location_in_parent=(0 0 0) orientation_in_parent=(0 0 0.2386217)
          location=(0 0 0)
    Body scapula_r: mass=0.7054 mass_center=(-0.053 -0.0229 -0.0247) inertia_xx=0.001 inertia_yy=0.001 inertia_zz=0.001
        meshes=rscapula.vtp
      WeldJoint ac3: parent_body=scapula_2 location_in_parent=(0 0 0) orientation_in_parent=(0.1172781 0 0)
          location=(0 0 0)
    Body humerus_1: mass=0 mass_center=(0 0 0) inertia_xx=0 inertia_yy=0 inertia_zz=0
      CustomJoint gh1: parent_body=scapula_r location_in_parent=(0.002 -0.023 -0.0439) location=(0 0 0)
        Coordinate GH_y: default_value=0.3490659 initial_value=0.3490659 range=(-1.570796 1.570796)
            keys=(g_key rightmouse_button) clamped=true
        SpatialTransform: axes_held_at_zero=(rotation1 rotation3 translation1 translation2 translation3)
          TransformAxis rotation2: axis=(0 1 0) coordinates=GH_y LinearFunction(coefficients=1 0)
    Body humerus_2: mass=0 mass_center=(0 0 0) inertia_xx=0 inertia_yy=0 inertia_zz=0
      CustomJoint gh2: parent_body=humerus_1 location_in_parent=(0 0 0) location=(0 0 0)
        Coordinate GH_z: default_value=0.5235988 initial_value=0.5235988 range=(0.08726646 1.570796)
            keys=(g_key leftmouse_button) clamped=true
        SpatialTransform: axes_held_at_zero=(rotation1 rotation2 translation1 translation2 translation3)
          TransformAxis rotation3: axis=(0 0 1) coordinates=GH_z LinearFunction(coefficients=1 0)
    Body humerus_r: mass=2.0519 mass_center=(0.0064 -0.0776 -0.0036) inertia_xx=0.0132 inertia_yy=0.001988
        inertia_zz=0.0132 meshes=rhumerus.vtp
      CustomJoint gh3: parent_body=humerus_2 location_in_parent=(0 0 0) location=(0 0 0)
        Coordinate GH_yy: default_value=-0.5235988 initial_value=-0.5235988 range=(-0.9599311 1.22173)
            keys=(g_key middlemouse_button) clamped=true
        SpatialTransform: axes_held_at_zero=(rotation1 rotation3 translation1 translation2 translation3)
          TransformAxis rotation2: axis=(0 1 0) coordinates=GH_yy LinearFunction(coefficients=1 0)
      WrapSphere deltoid: radius=0.0272 xyz_body_rotation=(-0.1930334 -0.2380629 -0.3857178)
          translation=(0.0022 -0.0009 -0.0018)
      WrapSphere inf_sup_sub: radius=0.0231 xyz_body_rotation=(-0.1930334 -0.2380629 -0.3857178)
          translation=(-0.0017 0.0018 -0.0013)
      WrapCylinder infra_cyl: radius=0.014 length=0.12 xyz_body_rotation=(1.566433 0.00610865 -0.9531243)
          translation=(0.0054 -0.023 -0.0044) quadrant=-x
      WrapCylinder ter_min_cyl: radius=0.015 length=0.1 xyz_body_rotation=(1.566433 0.00610865 -1.476723)
          translation=(0.0054 -0.023 -0.0044) quadrant=-x
      WrapCylinder ter_lat_pec: radius=0.01 length=0.1 xyz_body_rotation=(1.566433 0.00610865 -0.9531243)
          translation=(0.0057 -0.073 -0.0042)
    Body ulna_r: mass=0.5464 mass_center=(-0.0003 -0.0634 -0.0039) inertia_xx=0.0030585 inertia_yy=0.00045325
        inertia_zz=0.0030585 meshes=rulna.vtp
      CustomJoint hu: parent_body=humerus_r location_in_parent=(0.0058 -0.2907 0.0049) location=(0 0 0)
        Coordinate EL_x: default_value=0.6981317 initial_value=0.6981317 range=(0.08726646 2.443461)
            keys=(e_key leftmouse_button) clamped=true
        SpatialTransform: axes_held_at_zero=(rotation2 rotation3 translation1 translation2 translation3)
          TransformAxis rotation1: axis=(0.9997661 0.008446001 -0.019909) coordinates=EL_x
              LinearFunction(coefficients=1 0)
      WrapCylinder elbow: radius=0.019 length=0.05 xyz_body_rotation=(-2.511529 1.546536 2.792527) translation=(0 0 0)
          quadrant=y
      WrapCylinder elbow_circ: radius=0.015 length=0.05 xyz_body_rotation=(0.6300639 -1.546536 0) translation=(0 0 0)
      WrapCylinder pron_quad: radius=0.007 length=0.1 xyz_body_rotation=(-1.288053 -0.2326524 0)
          translation=(0.0365 -0.2064 -0.0577) quadrant=y
    Body radius_r: mass=0.5464 mass_center=(0.0106 -0.1179 -0.0129) inertia_xx=0.0030585 inertia_yy=0.00045325
        inertia_zz=0.0030585 meshes=rradius.vtp
      CustomJoint ur: parent_body=ulna_r location_in_parent=(0.0171 -0.0133 -0.0163) location=(0 0 0)
        Coordinate PS_y: default_value=1.570796 initial_value=1.570796 range=(0.08726646 2.792527)
            keys=(p_key leftmouse_button) clamped=true
        SpatialTransform: axes_held_at_zero=(rotation2 rotation3 translation1 translation2 translation3)
          TransformAxis rotation1: axis=(-0.113295 0.9740588 0.195892) coordinates=PS_y
              LinearFunction(coefficients=1 0)
      WrapCylinder radius: radius=0.0092 length=0.2 xyz_body_rotation=(-1.612859 -0.2022837 -1.777094)
          translation=(0.0035 -0.0322 -0.0003) quadrant=-x
      WrapCylinder supinator: radius=0.009 length=0.2 xyz_body_rotation=(-1.488766 0.00174533 0)
          translation=(0.0034 -0.1196 -0.0069) quadrant=-y
      WrapCylinder ulna_radius: radius=0.0071 length=0.1 xyz_body_rotation=(1.540951 0.2562143 2.670354)
          translation=(0.0146 -0.0891 0.0003) quadrant=-x
